# Define the finite deformation size. Try several values of this
# variable to verify that results do not depend on it.
variable up equal 1.0e-6

# Define the amount of random jiggle for atoms
# This prevents atoms from staying on saddle points
variable atomjiggle equal 1.0e-5

# Uncomment one of these blocks, depending on what units
# you are using in LAMMPS and for output

# metal units, elastic constants in eV/A^3
#units		metal
#variable cfac equal 6.2414e-7
#variable cunits string eV/A^3

# metal units, elastic constants in GPa
units		metal
atom_style      atomic


#---
boundary    	p s p
atom_modify map array


variable cfac equal 1.0e-4
variable cunits string GPa

# real units, elastic constants in GPa
#units		real
#variable cfac equal 1.01325e-4
#variable cunits string GPa

# Define minimization parameters
variable etol equal 0.0
variable ftol equal 1.0e-03 #-01 #6
variable maxiter equal 100000
variable maxeval equal 100000
variable dmax equal 1.0e-2

#---

#--- Need to set mass to something, just to satisfy LAMMPS
#mass 1 58.933
#mass 2 51.996
#mass 3 55.845
#mass 4 1.008
#mass 5 54.938

#--- discretization time
variable            dt        equal     0.001         # Time step

#--- thermostat parameters
variable            damp_t    equal     100*${dt}     # Thermostat damping
variable            damp_p    equal     1000*${dt}    # Barostat damping
